# COMPUTING A MATRIX OF THE JITTER-BASED SYNCHRONY INDEX FOR A RANGE OF SYNCHRONY WINDOWS AND RELATIVE SHIFTS
# Aric Agmon, Ph.D.
# aric.agmon@gmail.com
# COPYRIGHT NOTICE:
#
# This routine has been tested on MathCad versions 13.0 and 15.0.  You may use it freely for non-profit, academic research purposes. Use for commercial purposes requires a written consent by the author. You may modify the code as needed. You may redistribute it freely, unmodified or modified, but please do not remove this Copyright notice.
#
# Publications using this routine, or any modifications of this routine, should reference the following article:
# Agmon, A (2012)  A Novel, Jitter-Based Method for Detecting and Measuring Spike Synchrony and Quantifying Temporal Firing Precision.  Neural Systems and Circuits 2:5.
# NOTE:  Green-highlighted variables need to be user-defined for every new spike pair.
# Red-highlighted areas can optionally be user-defined.
# [component: outputs C]
# C is a matrix that contains the spike times.  To import your data file into C, right-click the region, then click Properties, then Browse to your data file, which should be in *.xls (Excel 2003) format.  As currently configured, the program ignores the first column and imports the next 4 columns as columns 0-3 of the matrix C. Column 1 (the third column of the Excel file) should contain spike occurrence times for Cell 1, and column 3  (the  5th column of the Excel file) should contain spike occurrence times for Cell 2. Columns 0 and 2 are ignored (in our data files they contain spike amplitudes).  This import scheme can easily be modified if needed, by changing which columns to import under Properties>Data Range, and by selecting other columns of the C matrix in the definitions of A and B below.  The spike list need not be contiguous - for example, it can contain spike occurrences for the first minute in each 10-minute block - but times do need to be in an ascending temporal order.  Spike times should be in the format  seconds.milliseconds, with a precision dictated by your data (in our case we measure spike times to a precision of 10 μs, e.g. 241.34736).  The program skips over non-numeric values or over "0" cells, so you can pad the list of spikes of the shorter spike train with zeros. Spike train length is limited only by available memory, but on a standard desktop computer computation of JBSI matrices for trains with more than a couple hundred spikes each may take a while.
K := 1
# K is the number of disjoint epochs to be combined (in most cases K=1)
# Start and End are the time points (in sec) delimiting each epoch
Start[0] := 0
End[0] := 1000
Start[1] := 330
End[1] := 400
Start[2] := 370
End[2] := 420
Start[3] := 510
End[3] := 580
C = [
    0, 0.304308, 0, 0.304222;
    0, 0.306349, 0, 0.306258;
    0, 0.308763, 0, 0.308521;
    0, 0.311016, 0, 0.310711;
    0, 0.313398, 0, 0.313213;
    0, 0.317045, 0, 0.316338;
    0, 0, 0, 0.321399;
    0, 0, 0, 0;
    0, 1.30415, 0, 1.3042;
    0, 1.30601, 0, 1.30615
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]
# The following generates contiguous vectors from all the epochs defined by the Start and End timepoints.
B :=
    i ← 0
    j ← 0
    for k ∈ 0 .. K - 1
        while Start[k] > C[:, 3][j]
            j ← j + 1
            return B if j > last(C[:, 3])
        while End[k] ≥ C[:, 3][j]
            while C[:, 3][j] == 0 or IsString(C[:, 3][j])
                j ← j + 1
                return B if j > last(C[:, 3])
            B[i] ← C[:, 3][j]
            j ← j + 1
            return B if j > last(C[:, 3])
            i ← i + 1
    return B
A :=
    i ← 0
    j ← 0
    for k ∈ 0 .. K - 1
        while Start[k] > C[:, 1][j]
            j ← j + 1
            return A if j > last(C[:, 1])
        while End[k] ≥ C[:, 1][j]
            while C[:, 1][j] == 0 or IsString(C[:, 1][j])
                j ← j + 1
                return A if j > last(C[:, 1])
            A[i] ← C[:, 1][j]
            j ← j + 1
            return A if j > last(C[:, 1])
            i ← i + 1
    return A
a := length(A)
b := length(B)
a = 108
b = 119
Q :=
    A if length(A) ≤ length(B)
    B otherwise
R :=
    B if length(A) ≤ length(B)
    A otherwise
# Q is the shorter (slower, reference) spike train, R is the longer (faster, target) one.
q := length(Q)
r := length(R)
i := 0 .. q - 1
j := 0 .. r - 1
q = 108
r = 119
# The following routines check for errors in the spike file, including non-monotonically increasing time stamps and the occurrence of two consecutive spikes less than 1.5 ms apart; if you expect such closely spaced spikes in your data, you can modify this threshold.  0 means no errors.
Check_Q :=
    k ← 0
    for i ∈ 0 .. q - 2
        continue if Q[i] == 0 or Q[i + 1] == 0
        Dif ← (Q[i + 1] - Q[i])*1000
        if Dif < 1.5
            Check[k, 0] ← Q[i]
            Check[k, 1] ← Dif
            k ← k + 1
    return Check
Check_R :=
    k ← 0
    for i ∈ 0 .. r - 2
        continue if R[i] == 0 or R[i + 1] == 0
        Dif ← (R[i + 1] - R[i])*1000
        if Dif < 1.5
            Check[k, 0] ← R[i]
            Check[k, 1] ← Dif
            k ← k + 1
    return Check
Check_Q = 0
Check_R = 0
M := 11  # This is the number of synchrony windows tested minus 1
N := 20
# This is the number of shifts tested
# minus 1
# As written, synchrony window (SW) varies from 0.1 to (M+1)*0.1 ms, in 0.1 ms increments, and Shift varies from 0.05*N to (-0.05)*N ms, in 0.1 ms increments. The range and step size of both parameters can be modified by changing their definition in the RESULT routine below.
# Note that following algorithm counts only the first R spike that is synchronous with any Q spike, so it produces correct results even if SW is larger than 0.5*min(ISI_R) and synchrony windows overlap.
RESULT :=
    {
        for m ∈ 0 .. M
            for n ∈ 0 .. N
                Shift ← (0.05*N - 0.1*n)
                for j ∈ 0 .. r - 1
                    S[j] ← (1000*R[j] + Shift)/1000
                SW ← (M - m + 1)*0.1
                SYN[m, n] ← 0
                for k ∈ 0 .. q - 1
                    for d ∈ 0 .. r - 1
                        if 1000*|Q[k] - S[d]| ≤ SW
                            SYN[m, n] ← SYN[m, n] + 1
                            break
                JW ← 2*SW
                g ← 0
                j ← 0
                while j ≤ r - 1
                    SEG[g, 0] ← (1000*S[j] - SW)/1000
                    break if j == r - 1
                    while 1000*(S[j + 1] - S[j]) < 2*SW
                        j ← j + 1
                        break if j == r - 1
                    break if j == r - 1
                    SEG[g, 1] ← (1000*S[j] + SW)/1000
                    g ← g + 1
                    j ← j + 1
                SEG[g, 1] ← (1000*S[j] + SW)/1000
                u ← g + 1
                for i ∈ 0 .. q - 1
                    for h ∈ 0 .. u - 1
                        Π[i, h] ← (JW - 1000*(SEG[h, 0] - Q[i]))/(2*JW) if (1000*SEG[h, 0] - JW) ≤ 1000*Q[i] ≤ min(1000*SEG[h, 0] + JW, 1000*SEG[h, 1] - JW)
                        (Π[i, h] ← min((1000*SEG[h, 1] - 1000*SEG[h, 0])/(2*JW), 1)) if min(1000*SEG[h, 0] + JW, 1000*SEG[h, 1] - JW) < 1000*Q[i] < max(1000*SEG[h, 0] + JW, 1000*SEG[h, 1] - JW)
                        (Π[i, h] ← (JW + 1000*(SEG[h, 1] - Q[i]))/(2*JW)) if max(1000*SEG[h, 0] + JW, 1000*SEG[h, 1] - JW) ≤ 1000*Q[i] ≤ (1000*SEG[h, 1] + JW)
                        Π[i, h] ← 0 otherwise
                    Ψ[i] ← sum(Π[i, h], h = 0 .. u - 1)
                MEAN[m, n] ← sum(Ψ)
                VAR ← sum(Ψ[i]*(1 - Ψ[i]), i = 0 .. q - 1)
                continue if VAR == 0
                Z[m, n] ← (SYN[m, n] - MEAN[m, n])/sqrt(VAR)
                JBSI[m, n] ← 2*(SYN[m, n] - MEAN[m, n])/q if SYN[m, n] - MEAN[m, n] ≥ 0
                JBSI[m, n] ← 2*(SYN[m, n] - MEAN[m, n])/q otherwise
    }
    RES ← augment(JBSI, Z, SYN, MEAN)
JBSI := submatrix(RESULT, 0, M, 0, N)
Z := submatrix(RESULT, 0, M, N + 1, 2*N + 1)
SYN := submatrix(RESULT, 0, M, 2*N + 2, 3*N + 2)
MEAN := submatrix(RESULT, 0, M, 3*N + 3, 4*N + 3)
# "MEAN" is the expected (average) synchrony count after a jitter
# "SYN" is the actual synchrony count
# "VAR" is the  variance of this count
# Z is the Z-value (statistical significance) of the observed synchrony.
# Left side of X axis (X=0) corresponds to a -0.1N ms (leftward) shift of the slower spike train.  X=N/2 corresponds to no shift. X=N (right side of X axis) corresponds to a +0.1N ms shift (rightward) of the slower spike train; 0. ms steps..
# Top of Y axis (Y=0) corresponds to a 0.1 synchrony window. Bottom of axis (Y=M) corresponds to a 0.1(M+1) ms synchrony window. 0.1 ms steps.
# [component: inputs JBSI]
JBSI = [
    0.28929, 0.288823, 0.306061, 0.304483, 0.301744, 0.298912, 0.29647, 0.276146, 0.2738, 0.251929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;
    0.258396, 0.337685, 0.361692, 0.383464, 0.386002, 0.368889, 0.35088, 0.368329, 0.347365, 0.344487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;
    0.0516343, 0.34019, 0.426194, 0.455944, 0.448329, 0.438708, 0.464718, 0.450319, 0.469245, 0.467667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;
    -0.243266, 0.0815792, 0.379336, 0.47911, 0.521235, 0.55909, 0.555427, 0.584913, 0.590201, 0.591651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;
    -0.41511, -0.243779, 0.0673553, 0.409572, 0.571169, 0.639763, 0.685284, 0.702894, 0.713843, 0.697662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;
    -0.587996, -0.426131, -0.237282, 0.145827, 0.502526, 0.680218, 0.763836, 0.783896, 0.779934, 0.770933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;
    -0.682037, -0.556705, -0.331497, -0.119182, 0.246119, 0.623866, 0.750193, 0.804066, 0.800941, 0.795324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;
    -0.57112, -0.564778, -0.427815, -0.228454, -0.0208241, 0.308602, 0.654806, 0.754426, 0.801463, 0.791454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;
    -0.347211, -0.405683, -0.430127, -0.304722, -0.148553, 0.0185648, 0.309873, 0.642604, 0.732188, 0.755451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;
    -0.131944, -0.151698, -0.208349, -0.287731, -0.223225, -0.12338, 0.0156944, 0.291111, 0.60179, 0.676543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;
    -0.000462963, -0.00405093, -0.0340046, -0.0916898, -0.175162, -0.125069, -0.0566898, 0.0312963, 0.266991, 0.412731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;
    0.00597222, 0.0119907, 0.00087963, -0.0114815, -0.0196296, -0.0686574, -0.00393519, 0.0696759, -0.02375, 0.026713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]
# [component: inputs Scale]
# [component: inputs Z]
Z = [
    4.56145, 4.55245, 4.84066, 4.8352, 4.82442, 4.81434, 4.80355, 4.49601, 4.48371, 4.15801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;
    3.76784, 4.88269, 5.19078, 5.48401, 5.51145, 5.26697, 5.01376, 5.27255, 4.99313, 4.97991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;
    0.704325, 4.57036, 5.64189, 5.95664, 5.78538, 5.61194, 5.91253, 5.71915, 5.96951, 5.97085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;
    -3.14006, 1.04029, 4.75133, 5.87517, 6.26297, 6.61229, 6.50189, 6.80243, 6.84622, 6.86529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;
    -5.02138, -2.92547, 0.7983, 4.77801, 6.55267, 7.22404, 7.6401, 7.76824, 7.84629, 7.65597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;
    -6.69691, -4.82569, -2.66791, 1.62671, 5.55748, 7.4562, 8.30276, 8.46611, 8.38735, 8.27098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;
    -7.50174, -6.08068, -3.60007, -1.28911, 2.65382, 6.70553, 8.03636, 8.58784, 8.53957, 8.47646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;
    -6.39908, -6.21297, -4.64405, -2.45655, -0.222561, 3.28907, 6.97444, 8.03907, 8.55208, 8.46371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;
    -4.42014, -4.8704, -4.94332, -3.39699, -1.62523, 0.20103, 3.33633, 6.90913, 7.87738, 8.14219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;
    -2.43598, -2.51223, -3.02917, -3.73502, -2.67295, -1.40489, 0.173735, 3.18179, 6.56795, 7.40198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;
    -0.0157778, -0.12175, -0.811811, -1.7724, -2.83301, -1.7239, -0.6995, 0.36284, 3.01973, 4.66498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;
    0.331073, 0.555019, 0.0369324, -0.419753, -0.601474, -1.58053, -0.0734345, 1.10104, -0.3219, 0.340469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]
